n := 0, 1 .. 63 = [
    0; 1; 2; 3; 4; 5; 6; 7; 8; 9
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]
fs := 5000*10^3
signal_source := 1024*sin(2000000*n*1/fs) + 512*sin(1000000*n*1/fs)
nn := 7, 8 .. 63
signal_noise := signal_source + 512*gaussn(64)
signal_filtered[nn] := 1/8*sum(signal_noise[nn - k], k = 0 .. 7)
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y =  # error: Эта переменная не определена.
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